variable        outfreq index 1000
variable        outputname index nvtrelaxation

units           real
boundary        p p p

newton          off
pair_style      lj/charmmfsw/coul/long 10 12
pair_modify     mix arithmetic

atom_style      full
bond_style      harmonic
angle_style     charmm
dihedral_style  charmmfsw
special_bonds   charmm
improper_style  harmonic

fix             cmap all cmap ./charmmff.cmap
fix_modify      cmap energy yes
read_data       ./addingwater.minimization.data   fix cmap crossterm CMAP

kspace_style    pppm 1e-5

neighbor        2 bin
neigh_modify    delay 5 every 1

thermo          ${outfreq}
thermo_style    custom step time etotal pe ke temp press ebond eangle edihed eimp evdwl ecoul elong
dump            1 all atom ${outfreq} ${outputname}.lammpstrj

variable        ttime equal "time"
variable        ppress equal "press"
variable        vvol equal "vol"
variable        llx equal "lx"
variable        lly equal "ly"
variable        llz equal "lz"
variable        ppe equal "pe"
variable        kke equal "ke"
variable        ppx equal "pxx"
variable        ppy equal "pyy"
variable        ppz equal "pzz"

fix             myglobalout1 all ave/time 10 100 ${outfreq} v_ttime v_ppress v_vvol v_ppe v_kke v_ppx v_ppy v_ppz file  ${outputname}.thermodynamics.dat

velocity        all create 308.15 ${seed} dist gaussian

fix             myshake1 all shake 1e-6 500 0 m 1.008 a 94

fix             2 all nvt temp 308.15 308.15 100.0
timestep        0.2
run             10000
unfix           2

fix             2 all nvt temp 308.15 308.15 100.0
timestep        1.0
run             98000
unfix           2

fix             2 all nvt temp 308.15 308.15 100.0
timestep        2.0
run             2450000
unfix           2

write_data      ${outputname}.data
